# Second Pass: Gas Thermal
T_outlet := 140 °F
T_inlet := 70.2 °F
Gallons_water_used := 3.89 gal
T_outlet := 143.7 °F
Gas_corr_used := 3.009 ft^3
m_dot_gas := 37.798 ft^3/hr
T_rise := T_outlet - T_inlet = 73.5 Δ°F
C_p := 1.00058 BTU/(Δ°F*lbm)
Heating_Value := 1068 BTU/ft^3
ρ_outlet := 8.16743 lbm/gal
Electric_used := 0 W*hr
Heat_input := m_dot_gas*Heating_Value = 40368.3 BTU/hr
Weight_water := Gallons_water_used*ρ_outlet = 31.7713 lbm
Heat_absorbed := (Weight_water*C_p*T_rise) = 2336.55 BTU
Heat_used := (Gas_corr_used*Heating_Value) + Electric_used = 3213.61 BTU
η := Heat_absorbed/Heat_used = 0.727078
A := (Heat_input*η) = 29350.9 BTU/hr
B := T_rise*ρ_outlet = 600.306 Δ°F*lbm/gal
Rate := A/B*1/C_p = 0.814414 gal/min
# Gas Thermal Rate Simplification
Rate_1 := m_dot_gas*Gallons_water_used/Gas_corr_used = 0.814414 gal/min
# Gas Thermal Rate Simplification
m_dot_gas := 37.455 ft^3/hr
Gallons_water_used := 10 gal
Gas_corr_used := 2.32 ft^3
Rate_1 := m_dot_gas*Gallons_water_used/Gas_corr_used = 2.69073 gal/min
m_dot_gas := 37. ft^3/hr
A := 1.44 gal/ft^3
Rate_2 := m_dot_gas*A = 0.888 gal/min
